// COMSOL Multiphysics 6.4.0.429 model "Embedded_PFC_PostNucleation_Intact_Gel.mph"
// Outline of the model tree

Parameters
  Rd = 3.0E-7[m]  // Initial LIQUID droplet radius, not gas cavity radius
  G = 20000.0[Pa]  // Neo-Hookean shear modulus, stipulated
  eta = 0.01[Pa*s]  // Kelvin-Voigt effective viscosity, stipulated
  sigO = 0.054[N/m]  // Constant liquid-PFC/aqueous outer interface control
  sigI = 0.00941[N/m]  // Constant PFP liquid/gas reference proxy
  pInf = 100[kPa]  // Absolute ambient pressure
  rhoHost = 1000[kg/m^3]  // Undrained effective host density
  cs = 1500[m/s]  // Mach-screen sound speed
  rhoInit = 1623.3028161533516[kg/m^3]  // Initial compressed PFC liquid density, independently evaluated
  uInit = -9932.759494838918[J/kg]  // Initial PFC specific internal energy, same HEOS reference
  pfh = 0.0[1]  // 0=PFP, 1=PFH; both real-fluid EOS installed
  lam = 1.2[1]  // Prescribed stationary stretch; not a fracture prediction
  lamInit = 1.2  // Explicit post-nucleation seed stretch
  lamLimit = 2.1  // DECLARED intact-model stopping screen; not measured rupture
  Ts = 350[K]  // Temperature normalization
  ps = 100[kPa]  // Pressure normalization
  us = 100[kJ/kg]  // Specific-energy normalization
  Us = sqrt(ps/rhoHost)  // Radial-speed normalization
  tau = Rd/Us  // Transient time normalization
  V0 = 4*pi*Rd^3/3  // Initial liquid inclusion volume
  mass = rhoInit*V0  // FIXED finite PFC mass
  Es = mass*us  // Accounting energy normalization
  Eseed = 1.3502185123046518E-11[J]  // Retained supplied-seed energy relative to all-liquid reference; preparation losses omitted
  tStep = tau/100  // Output step; solver maximum also bounded

Functions
  pfpp: Analytic
    expr = rr*28.8662540464*TK*(1+((0.036359237)*(rr/625.03378)^4*(421/TK)^1)*(4)+((1.1222855)*(rr/625.03378)^1*(421/TK)^0.19)*(1)+((-0.63721964)*(rr/625.03378)^1*(421/TK)^1)*(1)+((-1.3599906)*(rr/625.03378)^2*(421/TK)^1)*(2)+((0.24995429)*(rr/625.03378)^3*(421/TK)^0.33)*(3)+((-2.291332)*(rr/625.03378)^1*(421/TK)^1.51*exp(-(rr/625.03378)^2))*(1-2*(rr/625.03378)^2)+((-0.95997986)*(rr/625.03378)^3*(421/TK)^2.22*exp(-(rr/625.03378)^2))*(3-2*(rr/625.03378)^2)+((1.2463966)*(rr/625.03378)^2*(421/TK)^0.97*exp(-(rr/625.03378)^1))*(2-1*(rr/625.03378)^1)+((-0.41785522)*(rr/625.03378)^2*(421/TK)^2.54*exp(-(rr/625.03378)^2))*(2-2*(rr/625.03378)^2)+((-0.49360387)*(rr/625.03378)^1*(421/TK)^0.75*exp(-1.168*((rr/625.03378)-0.317)^2-2.13*((421/TK)-1.14)^2))*(1-2*1.168*(rr/625.03378)*((rr/625.03378)-0.317))+((1.8336733)*(rr/625.03378)^1*(421/TK)^0.375*exp(-0.944*((rr/625.03378)-0.702)^2-2.13*((421/TK)-1.185)^2))*(1-2*0.944*(rr/625.03378)*((rr/625.03378)-0.702))+((-0.27152337)*(rr/625.03378)^1*(421/TK)^0.5*exp(-2.28*((rr/625.03378)-0.686)^2-2.13*((421/TK)-0.95)^2))*(1-2*2.28*(rr/625.03378)*((rr/625.03378)-0.686))+((-0.11731069)*(rr/625.03378)^3*(421/TK)^1*exp(-1.486*((rr/625.03378)-1.257)^2-1.865*((421/TK)-1.02)^2))*(3-2*1.486*(rr/625.03378)*((rr/625.03378)-1.257))+((-0.488446)*(rr/625.03378)^2*(421/TK)^0.815*exp(-1.78*((rr/625.03378)-0.947)^2-1.59*((421/TK)-1.025)^2))*(2-2*1.78*(rr/625.03378)*((rr/625.03378)-0.947)))
    args = {TK, rr}
    fununit = 1
    argunit = {1, 1}
  pfpu: Analytic
    expr = 28.8662540464*TK*((-6.53756604064)*(421/TK)+14+5.761*1.15201900238*(421/TK)/(exp(1.15201900238*(421/TK))-1)+19.37*2.43705463183*(421/TK)/(exp(2.43705463183*(421/TK))-1)+7.096*4.77197149644*(421/TK)/(exp(4.77197149644*(421/TK))-1)+((0.036359237)*(rr/625.03378)^4*(421/TK)^1)*1+((1.1222855)*(rr/625.03378)^1*(421/TK)^0.19)*0.19+((-0.63721964)*(rr/625.03378)^1*(421/TK)^1)*1+((-1.3599906)*(rr/625.03378)^2*(421/TK)^1)*1+((0.24995429)*(rr/625.03378)^3*(421/TK)^0.33)*0.33+((-2.291332)*(rr/625.03378)^1*(421/TK)^1.51*exp(-(rr/625.03378)^2))*1.51+((-0.95997986)*(rr/625.03378)^3*(421/TK)^2.22*exp(-(rr/625.03378)^2))*2.22+((1.2463966)*(rr/625.03378)^2*(421/TK)^0.97*exp(-(rr/625.03378)^1))*0.97+((-0.41785522)*(rr/625.03378)^2*(421/TK)^2.54*exp(-(rr/625.03378)^2))*2.54+((-0.49360387)*(rr/625.03378)^1*(421/TK)^0.75*exp(-1.168*((rr/625.03378)-0.317)^2-2.13*((421/TK)-1.14)^2))*(0.75-2*2.13*(421/TK)*((421/TK)-1.14))+((1.8336733)*(rr/625.03378)^1*(421/TK)^0.375*exp(-0.944*((rr/625.03378)-0.702)^2-2.13*((421/TK)-1.185)^2))*(0.375-2*2.13*(421/TK)*((421/TK)-1.185))+((-0.27152337)*(rr/625.03378)^1*(421/TK)^0.5*exp(-2.28*((rr/625.03378)-0.686)^2-2.13*((421/TK)-0.95)^2))*(0.5-2*2.13*(421/TK)*((421/TK)-0.95))+((-0.11731069)*(rr/625.03378)^3*(421/TK)^1*exp(-1.486*((rr/625.03378)-1.257)^2-1.865*((421/TK)-1.02)^2))*(1-2*1.865*(421/TK)*((421/TK)-1.02))+((-0.488446)*(rr/625.03378)^2*(421/TK)^0.815*exp(-1.78*((rr/625.03378)-0.947)^2-1.59*((421/TK)-1.025)^2))*(0.815-2*1.59*(421/TK)*((421/TK)-1.025)))
    args = {TK, rr}
    fununit = 1
    argunit = {1, 1}
  pfpg: Analytic
    expr = 28.8662540464*TK*(1+log((rr/625.03378))+9.47670389005+(-6.53756604064)*(421/TK)+14*log((421/TK))+5.761*log(1-exp(-1.15201900238*(421/TK)))+19.37*log(1-exp(-2.43705463183*(421/TK)))+7.096*log(1-exp(-4.77197149644*(421/TK)))+(0.036359237)*(rr/625.03378)^4*(421/TK)^1+(1.1222855)*(rr/625.03378)^1*(421/TK)^0.19+(-0.63721964)*(rr/625.03378)^1*(421/TK)^1+(-1.3599906)*(rr/625.03378)^2*(421/TK)^1+(0.24995429)*(rr/625.03378)^3*(421/TK)^0.33+(-2.291332)*(rr/625.03378)^1*(421/TK)^1.51*exp(-(rr/625.03378)^2)+(-0.95997986)*(rr/625.03378)^3*(421/TK)^2.22*exp(-(rr/625.03378)^2)+(1.2463966)*(rr/625.03378)^2*(421/TK)^0.97*exp(-(rr/625.03378)^1)+(-0.41785522)*(rr/625.03378)^2*(421/TK)^2.54*exp(-(rr/625.03378)^2)+(-0.49360387)*(rr/625.03378)^1*(421/TK)^0.75*exp(-1.168*((rr/625.03378)-0.317)^2-2.13*((421/TK)-1.14)^2)+(1.8336733)*(rr/625.03378)^1*(421/TK)^0.375*exp(-0.944*((rr/625.03378)-0.702)^2-2.13*((421/TK)-1.185)^2)+(-0.27152337)*(rr/625.03378)^1*(421/TK)^0.5*exp(-2.28*((rr/625.03378)-0.686)^2-2.13*((421/TK)-0.95)^2)+(-0.11731069)*(rr/625.03378)^3*(421/TK)^1*exp(-1.486*((rr/625.03378)-1.257)^2-1.865*((421/TK)-1.02)^2)+(-0.488446)*(rr/625.03378)^2*(421/TK)^0.815*exp(-1.78*((rr/625.03378)-0.947)^2-1.59*((421/TK)-1.025)^2)+((0.036359237)*(rr/625.03378)^4*(421/TK)^1)*(4)+((1.1222855)*(rr/625.03378)^1*(421/TK)^0.19)*(1)+((-0.63721964)*(rr/625.03378)^1*(421/TK)^1)*(1)+((-1.3599906)*(rr/625.03378)^2*(421/TK)^1)*(2)+((0.24995429)*(rr/625.03378)^3*(421/TK)^0.33)*(3)+((-2.291332)*(rr/625.03378)^1*(421/TK)^1.51*exp(-(rr/625.03378)^2))*(1-2*(rr/625.03378)^2)+((-0.95997986)*(rr/625.03378)^3*(421/TK)^2.22*exp(-(rr/625.03378)^2))*(3-2*(rr/625.03378)^2)+((1.2463966)*(rr/625.03378)^2*(421/TK)^0.97*exp(-(rr/625.03378)^1))*(2-1*(rr/625.03378)^1)+((-0.41785522)*(rr/625.03378)^2*(421/TK)^2.54*exp(-(rr/625.03378)^2))*(2-2*(rr/625.03378)^2)+((-0.49360387)*(rr/625.03378)^1*(421/TK)^0.75*exp(-1.168*((rr/625.03378)-0.317)^2-2.13*((421/TK)-1.14)^2))*(1-2*1.168*(rr/625.03378)*((rr/625.03378)-0.317))+((1.8336733)*(rr/625.03378)^1*(421/TK)^0.375*exp(-0.944*((rr/625.03378)-0.702)^2-2.13*((421/TK)-1.185)^2))*(1-2*0.944*(rr/625.03378)*((rr/625.03378)-0.702))+((-0.27152337)*(rr/625.03378)^1*(421/TK)^0.5*exp(-2.28*((rr/625.03378)-0.686)^2-2.13*((421/TK)-0.95)^2))*(1-2*2.28*(rr/625.03378)*((rr/625.03378)-0.686))+((-0.11731069)*(rr/625.03378)^3*(421/TK)^1*exp(-1.486*((rr/625.03378)-1.257)^2-1.865*((421/TK)-1.02)^2))*(3-2*1.486*(rr/625.03378)*((rr/625.03378)-1.257))+((-0.488446)*(rr/625.03378)^2*(421/TK)^0.815*exp(-1.78*((rr/625.03378)-0.947)^2-1.59*((421/TK)-1.025)^2))*(2-2*1.78*(rr/625.03378)*((rr/625.03378)-0.947)))
    args = {TK, rr}
    fununit = 1
    argunit = {1, 1}
  pfhp: Analytic
    expr = rr*24.5959455275*TK*(1+((0.035689273)*(rr/616.92665)^4*(448/TK)^1)*(4)+((0.89834616)*(rr/616.92665)^1*(448/TK)^0.146)*(1)+((-0.11619207)*(rr/616.92665)^1*(448/TK)^1)*(1)+((-1.6558707)*(rr/616.92665)^2*(448/TK)^1)*(2)+((0.3090401)*(rr/616.92665)^3*(448/TK)^0.39)*(3)+((-3.0212885)*(rr/616.92665)^1*(448/TK)^1.56*exp(-(rr/616.92665)^2))*(1-2*(rr/616.92665)^2)+((-1.309987)*(rr/616.92665)^3*(448/TK)^2.25*exp(-(rr/616.92665)^2))*(3-2*(rr/616.92665)^2)+((1.4611604)*(rr/616.92665)^2*(448/TK)^0.987*exp(-(rr/616.92665)^1))*(2-1*(rr/616.92665)^1)+((-0.63849402)*(rr/616.92665)^2*(448/TK)^2.602*exp(-(rr/616.92665)^2))*(2-2*(rr/616.92665)^2)+((-0.40480926)*(rr/616.92665)^1*(448/TK)^1.87*exp(-0.8775*((rr/616.92665)-0.36)^2-1.171*((448/TK)-1.254)^2))*(1-2*0.8775*(rr/616.92665)*((rr/616.92665)-0.36))+((2.3673483)*(rr/616.92665)^1*(448/TK)^0.97*exp(-1*((rr/616.92665)-0.755)^2-1.14*((448/TK)-1.312)^2))*(1-2*1*(rr/616.92665)*((rr/616.92665)-0.755))+((0.40072213)*(rr/616.92665)^1*(448/TK)^2.22*exp(-1.327*((rr/616.92665)-1.693)^2-0.645*((448/TK)-1.178)^2))*(1-2*1.327*(rr/616.92665)*((rr/616.92665)-1.693))+((-0.43534683)*(rr/616.92665)^3*(448/TK)^1.7*exp(-1.102*((rr/616.92665)-1.04)^2-0.658*((448/TK)-1.326)^2))*(3-2*1.102*(rr/616.92665)*((rr/616.92665)-1.04))+((-0.90267664)*(rr/616.92665)^2*(448/TK)^1.31*exp(-1.274*((rr/616.92665)-0.646)^2-0.727*((448/TK)-0.902)^2))*(2-2*1.274*(rr/616.92665)*((rr/616.92665)-0.646)))
    args = {TK, rr}
    fununit = 1
    argunit = {1, 1}
  pfhu: Analytic
    expr = 24.5959455275*TK*((-9.80302171399)*(448/TK)+16+4.902*0.966517857143*(448/TK)/(exp(0.966517857143*(448/TK))-1)+23.43*2.03125*(448/TK)/(exp(2.03125*(448/TK))-1)+10.52*4.42410714286*(448/TK)/(exp(4.42410714286*(448/TK))-1)+((0.035689273)*(rr/616.92665)^4*(448/TK)^1)*1+((0.89834616)*(rr/616.92665)^1*(448/TK)^0.146)*0.146+((-0.11619207)*(rr/616.92665)^1*(448/TK)^1)*1+((-1.6558707)*(rr/616.92665)^2*(448/TK)^1)*1+((0.3090401)*(rr/616.92665)^3*(448/TK)^0.39)*0.39+((-3.0212885)*(rr/616.92665)^1*(448/TK)^1.56*exp(-(rr/616.92665)^2))*1.56+((-1.309987)*(rr/616.92665)^3*(448/TK)^2.25*exp(-(rr/616.92665)^2))*2.25+((1.4611604)*(rr/616.92665)^2*(448/TK)^0.987*exp(-(rr/616.92665)^1))*0.987+((-0.63849402)*(rr/616.92665)^2*(448/TK)^2.602*exp(-(rr/616.92665)^2))*2.602+((-0.40480926)*(rr/616.92665)^1*(448/TK)^1.87*exp(-0.8775*((rr/616.92665)-0.36)^2-1.171*((448/TK)-1.254)^2))*(1.87-2*1.171*(448/TK)*((448/TK)-1.254))+((2.3673483)*(rr/616.92665)^1*(448/TK)^0.97*exp(-1*((rr/616.92665)-0.755)^2-1.14*((448/TK)-1.312)^2))*(0.97-2*1.14*(448/TK)*((448/TK)-1.312))+((0.40072213)*(rr/616.92665)^1*(448/TK)^2.22*exp(-1.327*((rr/616.92665)-1.693)^2-0.645*((448/TK)-1.178)^2))*(2.22-2*0.645*(448/TK)*((448/TK)-1.178))+((-0.43534683)*(rr/616.92665)^3*(448/TK)^1.7*exp(-1.102*((rr/616.92665)-1.04)^2-0.658*((448/TK)-1.326)^2))*(1.7-2*0.658*(448/TK)*((448/TK)-1.326))+((-0.90267664)*(rr/616.92665)^2*(448/TK)^1.31*exp(-1.274*((rr/616.92665)-0.646)^2-0.727*((448/TK)-0.902)^2))*(1.31-2*0.727*(448/TK)*((448/TK)-0.902)))
    args = {TK, rr}
    fununit = 1
    argunit = {1, 1}
  pfhg: Analytic
    expr = 24.5959455275*TK*(1+log((rr/616.92665))+14.4861274604+(-9.80302171399)*(448/TK)+16*log((448/TK))+4.902*log(1-exp(-0.966517857143*(448/TK)))+23.43*log(1-exp(-2.03125*(448/TK)))+10.52*log(1-exp(-4.42410714286*(448/TK)))+(0.035689273)*(rr/616.92665)^4*(448/TK)^1+(0.89834616)*(rr/616.92665)^1*(448/TK)^0.146+(-0.11619207)*(rr/616.92665)^1*(448/TK)^1+(-1.6558707)*(rr/616.92665)^2*(448/TK)^1+(0.3090401)*(rr/616.92665)^3*(448/TK)^0.39+(-3.0212885)*(rr/616.92665)^1*(448/TK)^1.56*exp(-(rr/616.92665)^2)+(-1.309987)*(rr/616.92665)^3*(448/TK)^2.25*exp(-(rr/616.92665)^2)+(1.4611604)*(rr/616.92665)^2*(448/TK)^0.987*exp(-(rr/616.92665)^1)+(-0.63849402)*(rr/616.92665)^2*(448/TK)^2.602*exp(-(rr/616.92665)^2)+(-0.40480926)*(rr/616.92665)^1*(448/TK)^1.87*exp(-0.8775*((rr/616.92665)-0.36)^2-1.171*((448/TK)-1.254)^2)+(2.3673483)*(rr/616.92665)^1*(448/TK)^0.97*exp(-1*((rr/616.92665)-0.755)^2-1.14*((448/TK)-1.312)^2)+(0.40072213)*(rr/616.92665)^1*(448/TK)^2.22*exp(-1.327*((rr/616.92665)-1.693)^2-0.645*((448/TK)-1.178)^2)+(-0.43534683)*(rr/616.92665)^3*(448/TK)^1.7*exp(-1.102*((rr/616.92665)-1.04)^2-0.658*((448/TK)-1.326)^2)+(-0.90267664)*(rr/616.92665)^2*(448/TK)^1.31*exp(-1.274*((rr/616.92665)-0.646)^2-0.727*((448/TK)-0.902)^2)+((0.035689273)*(rr/616.92665)^4*(448/TK)^1)*(4)+((0.89834616)*(rr/616.92665)^1*(448/TK)^0.146)*(1)+((-0.11619207)*(rr/616.92665)^1*(448/TK)^1)*(1)+((-1.6558707)*(rr/616.92665)^2*(448/TK)^1)*(2)+((0.3090401)*(rr/616.92665)^3*(448/TK)^0.39)*(3)+((-3.0212885)*(rr/616.92665)^1*(448/TK)^1.56*exp(-(rr/616.92665)^2))*(1-2*(rr/616.92665)^2)+((-1.309987)*(rr/616.92665)^3*(448/TK)^2.25*exp(-(rr/616.92665)^2))*(3-2*(rr/616.92665)^2)+((1.4611604)*(rr/616.92665)^2*(448/TK)^0.987*exp(-(rr/616.92665)^1))*(2-1*(rr/616.92665)^1)+((-0.63849402)*(rr/616.92665)^2*(448/TK)^2.602*exp(-(rr/616.92665)^2))*(2-2*(rr/616.92665)^2)+((-0.40480926)*(rr/616.92665)^1*(448/TK)^1.87*exp(-0.8775*((rr/616.92665)-0.36)^2-1.171*((448/TK)-1.254)^2))*(1-2*0.8775*(rr/616.92665)*((rr/616.92665)-0.36))+((2.3673483)*(rr/616.92665)^1*(448/TK)^0.97*exp(-1*((rr/616.92665)-0.755)^2-1.14*((448/TK)-1.312)^2))*(1-2*1*(rr/616.92665)*((rr/616.92665)-0.755))+((0.40072213)*(rr/616.92665)^1*(448/TK)^2.22*exp(-1.327*((rr/616.92665)-1.693)^2-0.645*((448/TK)-1.178)^2))*(1-2*1.327*(rr/616.92665)*((rr/616.92665)-1.693))+((-0.43534683)*(rr/616.92665)^3*(448/TK)^1.7*exp(-1.102*((rr/616.92665)-1.04)^2-0.658*((448/TK)-1.326)^2))*(3-2*1.102*(rr/616.92665)*((rr/616.92665)-1.04))+((-0.90267664)*(rr/616.92665)^2*(448/TK)^1.31*exp(-1.274*((rr/616.92665)-0.646)^2-0.727*((448/TK)-0.902)^2))*(2-2*1.274*(rr/616.92665)*((rr/616.92665)-0.646)))
    args = {TK, rr}
    fununit = 1
    argunit = {1, 1}

Variables
  v "Variables"
    R = Rd*rr  // Outer liquid-shell/gel radius
    W = Us*ww  // RADIAL speed, not jet speed
    D = Es*dd  // Integrated nonnegative host viscous loss
    T = Ts*th  // Uniform PFC phase temperature
    rl = 1000[kg/m^3]*exp(al)  // Liquid PFC density
    rv = 10[kg/m^3]*exp(av)  // Vapor PFC density
    b = R*exp(ab)  // Vapor core radius; requires 0<b<R
    V = 4*pi*R^3/3  // Whole PFC inclusion volume
    Vb = 4*pi*b^3/3  // Vapor-core volume
    ml = rl*(V-Vb)  // Remaining LIQUID PFC mass
    mv = rv*Vb  // VAPOR PFC mass
    pL = if(pfh>0.5,pfhp(T/1[K],rl/1[kg/m^3]),pfpp(T/1[K],rl/1[kg/m^3]))*1[Pa]  // Real-fluid liquid pressure
    pV = if(pfh>0.5,pfhp(T/1[K],rv/1[kg/m^3]),pfpp(T/1[K],rv/1[kg/m^3]))*1[Pa]  // Real-fluid vapor pressure
    uL = if(pfh>0.5,pfhu(T/1[K],rl/1[kg/m^3]),pfpu(T/1[K],rl/1[kg/m^3]))*1[J/kg]  // Liquid specific internal energy
    uV = if(pfh>0.5,pfhu(T/1[K],rv/1[kg/m^3]),pfpu(T/1[K],rv/1[kg/m^3]))*1[J/kg]  // Vapor specific internal energy
    gL = if(pfh>0.5,pfhg(T/1[K],rl/1[kg/m^3]),pfpg(T/1[K],rl/1[kg/m^3]))*1[J/kg]  // Liquid chemical potential per mass
    gV = if(pfh>0.5,pfhg(T/1[K],rv/1[kg/m^3]),pfpg(T/1[K],rv/1[kg/m^3]))*1[J/kg]  // Vapor chemical potential per mass
    pEl = G/2*(5-4*Rd/R-(Rd/R)^4)  // Intact spherical neo-Hookean resistance
    pNeed = pInf+pEl+2*sigO/R  // STATIC outer liquid pressure required by host
    Egel = 2*pi*G*(5*R^3/3-2*Rd*R^2+Rd^4/R-2*Rd^3/3)  // Recoverable gel strain energy
    Eint = ml*uL+mv*uV-mass*uInit  // PFC internal-energy change from initial LIQUID
    Esurf = 4*pi*(sigO*(R^2-Rd^2)+sigI*b^2)  // Both interfaces, distinct tensions
    Eamb = pInf*(V-V0)  // Work against ambient pressure
    Khost = 2*pi*rhoHost*R^3*W^2  // Host radial kinetic energy
    Etot = Eint+Egel+Esurf+Eamb+Khost+D  // Closed retained-seed-energy accounting
    acc = ((pL-pNeed-4*eta*W/R)/rhoHost-1.5*W^2)/R  // Incompressible radial host acceleration
    Pdis = 16*pi*eta*R*W^2  // Nonnegative host viscous-loss power
    massRes = (ml+mv)/mass-1  // Finite mass residual
    chemRes = gL-gV  // Phase equilibrium residual, J/kg
    innerRes = pV-pL-2*sigI/b  // Inner capillary-traction residual, Pa
    outerRes = pL-pNeed  // Static host-traction residual, Pa
    energyRes = (Etot-Eseed)/Eseed  // Retained-seed-energy residual
    vapFrac = mv/mass  // Finite PFC vapor mass fraction
    shell = R-b  // Remaining liquid-shell thickness
    emittedMass = 0[kg]  // No outlet or fracture is modeled

Physics
  ge: GlobalEquations "Global ODEs and DAEs"
    ge1: GlobalEquations
      name = {rr, ww, dd, th, al, av, ab}
      equation = {tau*(rrt-W/Rd), tau*(wwt-acc/Us), tau*(ddt-Pdis/Es), innerRes/ps, chemRes/us, massRes, (Etot-Eseed)/Es}
      initialValueU = {lamInit, 0, 0, 1.02351890814, 0.316230005063, 1.85917504951, -0.368803390153}
      initialValueUt = {0, 0, 0, 0, 0, 0, 0}
      valueType = complex
      fieldName = ODE1
      DependentVariableQuantity = dimensionless
      CustomDependentVariableUnit = m
      SourceTermQuantity = dimensionless
      CustomSourceTermUnit = m

Studies
  std "Study"
    time: Transient "Time Dependent" | tlist = range(0,tStep,50*tau)

Solver configurations
  sol1 "Solution 1" (study std)
    v1: Variables "Dependent Variables 1"
    t1: Time "Time-Dependent Solver 1" | rtol = 1e-8; tstepsbdf = strict
      dDef: Direct
      fc1: FullyCoupled
      stop: StopCondition
        stopcondterminateon = {negative, negative, negative, negative, negative, negative}
        stopconddesc = {First expansion turning point, "Declared intact stretch limit, not rupture", Mach 0.1 screen, Liquid shell exhausted, Vapor inventory exhausted, Liquid inventory exhausted}
        stopcondarr = {c.W, lamLimit-c.R/Rd, 0.1-abs(c.W)/cs, c.shell, c.vapFrac, 1-c.vapFrac}

Datasets
  dset1: Solution | solution = sol1

Derived values
  eg: EvalGlobal "Global Evaluation"
    data = dset1
    table = tbl
    expr = {t, c.R/Rd, c.T, c.rl, c.rv, c.b, c.pL, c.pV, c.vapFrac, c.Etot, c.pEl, c.shell, c.massRes, c.chemRes, c.innerRes, c.outerRes, c.W, c.D, c.Khost, c.energyRes, c.emittedMass}
    descr = {time_s, stretch, T_K, liquid_density_kg_m3, vapor_density_kg_m3, bubble_radius_m, liquid_pressure_Pa, vapor_pressure_Pa, vapor_fraction, equilibrium_state_energy_J, gel_pressure_Pa, shell_thickness_m, mass_relative_residual, chemical_residual_J_kg, inner_traction_residual_Pa, outer_static_residual_Pa, radial_speed_m_s, dissipated_J, host_kinetic_J, total_energy_residual, exterior_emitted_mass_kg}

Plots
  phase: PlotGroup1D "Finite PFC vapor MASS fraction" | data = dset1
    g: Global | expr = c.vapFrac
  energy: PlotGroup1D "Energy destinations and conservation" | data = dset1
    g: Global | expr = {c.Eint/Eseed, c.Egel/Eseed, c.Esurf/Eseed, c.Eamb/Eseed, c.Khost/Eseed, c.D/Eseed}
  motion: PlotGroup1D "RADIAL wall speed; no exterior jet" | data = dset1
    g: Global | expr = c.W; unit = m/s