// COMSOL Multiphysics 6.4.0.429 model "Model_B_Hydrogel_Confinement_Jet_Transmission.mph"
// Outline of the model tree

Parameters
  tauLaser = 10[ns]  // One optical pulse, replaced by a post-activation initial state; pulse onset is not solved
  Rg0 = 15[um]  // Post-activation source radius; not a liquid PFC-droplet radius
  Rc0 = 30[um]  // Initially stress-free spherical chamber radius
  a = 5.0E-6[m]  // Radius of the pre-existing liquid outlet
  L = 50[um]  // Effective liquid-column inertance length
  Lbudget = (Vc0-Vg0)/A  // Connected chamber liquid inventory divided by outlet area; separate from inertance length
  rho = 1000[kg/m^3]  // Stipulated water-like carrier density
  rhoG = 1000[kg/m^3]  // Stipulated undrained gel density
  pInf = 100[kPa]  // Absolute ambient pressure
  kap = 1.4  // Adiabatic ideal-gas control exponent; not a validated PFC-vapor EOS
  p0 = 379631.6312499547[Pa]  // Post-activation absolute source pressure, set from available work by the builder
  sigma = 0.072[N/m]  // Stipulated water-like surface tension
  G = 20000.0[Pa]  // Intact incompressible neo-Hookean shear modulus
  etaG = 0.01[Pa*s]  // Kelvin-Voigt effective network viscosity
  Kloss = 0.0  // Conditional outlet minor-loss coefficient, dimensionless
  Rloss = 0[Pa*s/m]  // Measured/fitted pressure-to-speed resistance; not an instantaneous Poiseuille approximation
  outletOpen = 1  // 1 for a pre-existing open liquid channel; 0 for sealed control
  cL = 1500[m/s]  // Reference communication speed used only for a validity diagnostic
  Us = 10[m/s]  // Velocity scale for dimensionless state variables
  tau = Rc0/Us  // Numerical nondimensionalization time scale
  A = pi*a^2  // Liquid-plug cross-section
  Vg0 = 4*pi*Rg0^3/3  // Initial finite gas source volume
  Vc0 = 4*pi*Rc0^3/3  // Initial chamber volume
  Veq = Vg0*(p0/pInf)^(1/kap)  // Gas volume at ambient pressure
  E0 = p0*Vg0/(kap-1)*(1-(Vg0/Veq)^(kap-1))-pInf*(Veq-Vg0)  // Available reversible source work above ambient
  mJet = rho*A*L  // Effective liquid-column inertia mass, not emitted mass
  Iscale = mJet*Us  // Scaling momentum for the emitted-impulse accumulator
  Uceiling = sqrt(2*E0/mJet)  // Energy-only peak outlet-speed bound from column inertia; not an achieved velocity
  qCeiling = E0/(A*L)  // Energy-only liquid dynamic-pressure upper bound
  pCap = 2*sigma/a  // Pinned hemispherical-meniscus resistance
  tObs = 1[us]  // Declared averaging interval for an impulse-only arrest-pressure bound
  AObs = A  // Declared pressure observer area

Variables
  v "Variables"
    x = Lbudget*qq  // Discharged liquid volume divided by outlet area, m
    U = Us*vv  // Outward liquid-plug speed, m/s
    R = Rc0*rr  // Chamber wall radius, m
    Uw = Us*ww  // Chamber wall expansion speed, m/s
    Vg = Vg0+A*x+4*pi*(R^3-Rc0^3)/3  // Finite gas volume including expelled liquid and chamber expansion
    Vdot = A*U+4*pi*R^2*Uw  // Total source volume rate
    pb = p0*(Vg0/Vg)^kap  // Uniform absolute pressure of finite ideal-gas control source
    pEl = G/2*(5-4*Rc0/R-(Rc0/R)^4)  // Elastic resistance pressure at spherical gel wall
    pRes = pEl+4*etaG*Uw/R  // Elastic plus viscous gel wall resistance
    Wgel = 2*pi*G*(5*R^3/3-2*Rc0*R^2+Rc0^4/R-2*Rc0^3/3)  // Recoverable elastic gel work
    Kgel = 2*pi*rhoG*R^3*Uw^2  // Spherical gel radial kinetic energy
    Kjet = mJet*U^2/2  // Stored kinetic energy of effective liquid-column inertia; not emitted energy
    Esurf = pCap*A*x  // Reversible meniscus work during outward motion
    ploss = Rloss*U+rho*Kloss*U*abs(U)/2  // Declared dissipative port pressure drop
    acc = outletOpen*(pb-pInf-pCap-ploss-rho*U^2/2)/(rho*L)  // Outlet acceleration from unsteady Bernoulli with discharged kinetic head
    wallAcc = ((pb-pInf-pRes)/rhoG-1.5*Uw^2)/R  // Spherical gel wall acceleration
    Pdis = outletOpen*A*(Rloss*U^2+rho*Kloss*abs(U)^3/2)+16*pi*etaG*R*Uw^2  // Nonnegative irreversible port and gel loss power
    Edis = E0*dd  // Accumulated irreversible loss
    Eout = E0*ee  // Kinetic energy actually discharged at the outlet
    Iout = Iscale*ii  // Axial momentum actually discharged at the outlet
    Mout = rho*A*x  // Finite emitted liquid mass
    Pout = outletOpen*rho*A*U^3/2  // Discharged kinetic power on the outward branch
    energyResidual = (pb*Vg/(kap-1)-p0*Vg0/(kap-1)+pInf*(Vg-Vg0)+Kjet+Kgel+Wgel+Esurf+Edis+Eout)/E0  // Normalized energy residual including actual outflow
    Fconf = pi*R^2*pEl  // Axial resultant on one gel hemisphere, not a net force on the whole sphere
    qJet = rho*U^2/2  // Liquid-plug dynamic-pressure scale, not an impact pressure
    Ijet = mJet*U  // Effective column momentum; actual discharged impulse is Iout
    Fflux = rho*A*U^2  // Momentum-flux scale, not a resolved unsteady target force
    pArrestBound = Iout/(AObs*tObs)  // Mean arrest-pressure upper bound from emitted impulse on the declared observer
    stroke = x/Lbudget  // Fraction of the finite discharge-volume budget
    stretch = R/Rc0  // Gel inner-wall circumferential stretch
    Mjet = abs(U)/cL  // Liquid-speed Mach diagnostic
    Mwall = abs(Uw)/cL  // Wall-speed Mach diagnostic
    communication = max(L,2*Rc0)/cL*kap*abs(Vdot)/Vg  // Pressure-change communication ratio; no propagation field is solved

Physics
  ge: GlobalEquations "Four motion states + loss, emitted energy and impulse; first event"
    ge1: GlobalEquations
      name = {qq, vv, rr, ww, dd, ee, ii}
      equation = {tau*(qqt-outletOpen*U/Lbudget), tau*(vvt-acc/Us), tau*(rrt-Uw/Rc0), tau*(wwt-wallAcc/Us), tau*(ddt-Pdis/E0), tau*(eet-Pout/E0), tau*(iit-outletOpen*rho*A*U^2/Iscale)}
      initialValueU = {0, 0, 1, 0, 0, 0, 0}
      initialValueUt = {0, 0, 0, 0, 0, 0, 0}
      valueType = complex
      fieldName = ODE1
      DependentVariableQuantity = dimensionless
      CustomDependentVariableUnit = m
      SourceTermQuantity = dimensionless
      CustomSourceTermUnit = m

Studies
  std "Single post-pulse expansion / first ejection episode"
    time: Transient "Time Dependent" | tlist = range(0,1[ns],100[us])

Solver configurations
  sol1 "Solution 1" (study std)
    v1: Variables "Dependent Variables 1"
    t1: Time "Time-Dependent Solver 1" | tlist = range(0,1[ns],100[us]); rtol = 1e-9; tstepsbdf = strict
      dDef: Direct
      fc1: FullyCoupled
      stop: StopCondition
        stopcondterminateon = {negative, negative, negative, negative}
        stopconddesc = {"First outward ejection ends, or first sealed wall turning point", Connected chamber liquid inventory exhausted, Declared 20% wall-stretch screen (not measured fracture), Declared Mach 0.1 screen}
        stopcondarr = {if(outletOpen>0.5,c.U,c.Uw), Lbudget-c.x, 1.2-c.stretch, 0.1-max(c.Mjet,c.Mwall)}

Datasets
  dset1: Solution | solution = sol1

Derived values
  eg: EvalGlobal "Global Evaluation"
    data = dset1
    table = tbl
    expr = {t, c.x, c.U, c.R, c.Uw, c.Vg, c.pb-pInf, c.pEl, c.pRes, c.Fconf, c.qJet, c.Ijet, c.Fflux, c.Kjet, c.Kgel, c.Wgel, c.Esurf, c.Edis, c.energyResidual, c.stroke, c.stretch, c.Mjet, c.Mwall, c.communication, c.acc, c.wallAcc, c.pArrestBound, c.Eout, c.Iout, c.Mout}
    descr = {time_s, x_m, u_m_s, r_m, wall_speed_m_s, gas_volume_m3, source_gauge_Pa, elastic_Pa, gel_wall_resistance_Pa, confinement_hemisphere_force_N, jet_dynamic_Pa, column_momentum_N_s, momentum_flux_scale_N, kinetic_column_J, kinetic_gel_J, elastic_J, capillary_J, dissipation_J, residual, port_stroke_fraction, wall_stretch, liquid_Mach, wall_Mach, communication_ratio, acceleration_m_s2, wall_acceleration_m_s2, mean_arrest_pressure_bound_Pa, emitted_energy_J, emitted_impulse_N_s, emitted_mass_kg}

Plots
  jet: PlotGroup1D "Outlet velocity through the complete first outward ejection" | data = dset1
    g: Global | expr = c.U; unit = m/s
  pressure: PlotGroup1D "Source, elastic resistance and liquid dynamic pressure are distinct" | data = dset1
    g: Global | expr = {c.pb-pInf, c.pEl, c.qJet}; unit = {kPa, kPa, kPa}
  energy: PlotGroup1D "Source energy partition including actual discharged energy" | data = dset1
    g: Global | expr = {c.Kjet/E0, c.Kgel/E0, c.Wgel/E0, c.Edis/E0, c.Eout/E0}